# Información del Blanco
ρY := 4.472  # g/cm3
ρblanco := 4.472  # g/cm3
MY := 89  # g/mol
# Stopping Power:
SP(E) := 71.8414*E^-0.38297
# Información de las Reacciones:
(4 - 14)*MeV
SE1A(E) := -0.0146254*E^6 + 0.7944*E^5 - 17.3578*E^4 + 193.337*E^3 - 1142.69*E^2 + 3409.05*E - 4034.82
# Reacción 1:(p,n)89gZr
λ[1] := 0.693/78.41
(15 - 28)*MeV
SE1B(E) := -0.00318174817*E^6 + 0.417240236*E^5 - 22.5692898*E^4 + 643.777363*E^3 - 10195.8391*E^2 + 84796.3848*E - 288167.104
C1(E1, E2) :=
    v ← 0 if (E2 ≤ 4)
    if (4 < E2 ≤ 14)
        v ← integral((-0.0146254*E^6 + 0.7944*E^5 - 17.3578*E^4 + 193.337*E^3 - 1142.69*E^2 + 3409.05*E - 4034.82)/(0.135151*E^-0.735593), E = 4 .. E2) if E1 ≤ 4
        v ← integral((-0.0146254*E^6 + 0.7944*E^5 - 17.3578*E^4 + 193.337*E^3 - 1142.69*E^2 + 3409.05*E - 4034.82)/(0.135151*E^-0.735593), E = E1 .. E2) if 4 < E1 ≤ 14
    if (14 < E2 ≤ 28)
        v ← integral((-0.0146254*E^6 + 0.7944*E^5 - 17.3578*E^4 + 193.337*E^3 - 1142.69*E^2 + 3409.05*E - 4034.82)/(0.135151*E^-0.735593), E = E1 .. 14) + integral((-0.00318174817*E^6 + 0.417240236*E^5 - 22.5692898*E^4 + 643.777363*E^3 - 10195.8391*E^2 + 84796.3848*E - 288167.104)/(71.8414*E^-0.38297), E = 14 .. E2) if E1 < 14
        v ← integral((-0.00318174817*E^6 + 0.417240236*E^5 - 22.5692898*E^4 + 643.777363*E^3 - 10195.8391*E^2 + 84796.3848*E - 288167.104)/(0.135151*E^-0.735593), E = E1 .. E2) if E1 ≥ 14
    v ← 0 if (28 < E2)
# Reacción 2:(p,n)89mZr
(5 - 13)*MeV
SE2A(E) := 0.0180137*E^6 - 1.10411*E^5 + 27.6471*E^4 - 360.118*E^3 + 2551.09*E^2 - 9178.71*E + 13066
λ[2] := 0.693/0.0693
14 - 30*MeV
SE2B(E) := -0.00213492*E^5 + 0.263519*E^4 - 12.9407*E^3 + 316.096*E^2 - 3842.37*E + 18622.5
C2(E1, E2) :=
    v ← 0 if (E2 ≤ 5)
    if (5 < E2 ≤ 13)
        v ← integral((0.0180137*E^6 - 1.10411*E^5 + 27.6471*E^4 - 360.118*E^3 + 2551.09*E^2 - 9178.71*E + 13066)/(0.135151*E^-0.735593), E = 5 .. E2) if E1 ≤ 5
        v ← integral((0.0180137*E^6 - 1.10411*E^5 + 27.6471*E^4 - 360.118*E^3 + 2551.09*E^2 - 9178.71*E + 13066)/(0.135151*E^-0.735593), E = E1 .. E2) if 5 < E1 ≤ 13
    if (13 < E2 ≤ 30)
        v ← integral((0.0180137*E^6 - 1.10411*E^5 + 27.6471*E^4 - 360.118*E^3 + 2551.09*E^2 - 9178.71*E + 13066)/(0.135151*E^-0.735593), E = E1 .. 13) + integral((-0.00213492*E^5 + 0.263519*E^4 - 12.9407*E^3 + 316.096*E^2 - 3842.37*E + 18622.5)/(0.135151*E^-0.735593), E = 13 .. E2) if E1 < 13
        v ← integral((-0.00213492*E^5 + 0.263519*E^4 - 12.9407*E^3 + 316.096*E^2 - 3842.37*E + 18622.5)/(0.135151*E^-0.735593), E = E1 .. E2) if E1 ≥ 13
(14 - 18)*MeV
SE3A(E) := 0.88414*E^5 - 72.33825*E^4 + 2355.99512*E^3 - 38193.22925*E^2 + 308430.39022*E - 993469.91996
# Reacción 3: (p,2n)88Zr
λ[3] := 0.693/2001.6
(19 - 30)*MeV
SE3B(E) := 0.0446203*E^5 - 5.3766406*E^4 + 257.3459687*E^3 - 6122.2613123*E^2 + 72441.9424472*E - 340455.538986
C3(E1, E2) :=
    v ← 0 if (E2 ≤ 14)
    if (14 < E2 ≤ 18)
        v ← integral((0.88414*E^5 - 72.33825*E^4 + 2355.99512*E^3 - 38193.22925*E^2 + 308430.39022*E - 993469.91996)/(0.135151*E^-0.735593), E = 14 .. E2) if E1 ≤ 14
        v ← integral((0.88414*E^5 - 72.33825*E^4 + 2355.99512*E^3 - 38193.22925*E^2 + 308430.39022*E - 993469.91996)/(0.135151*E^-0.735593), E = E1 .. E2) if 14 < E1 ≤ 18
    if (18 < E2 ≤ 30)
        v ← integral((0.88414*E^5 - 72.33825*E^4 + 2355.99512*E^3 - 38193.22925*E^2 + 308430.39022*E - 993469.91996)/(0.135151*E^-0.735593), E = E1 .. 18) + integral((0.0446203*E^5 - 5.3766406*E^4 + 257.3459687*E^3 - 6122.2613123*E^2 + 72441.9424472*E - 340455.538986)/(0.135151*E^-0.735593), E = 18 .. E2) if E1 < 18
        v ← integral((0.0446203*E^5 - 5.3766406*E^4 + 257.3459687*E^3 - 6122.2613123*E^2 + 72441.9424472*E - 340455.538986)/(0.135151*E^-0.735593), E = E1 .. E2) if E1 ≥ 18
# Reacción 4: (p,p') 89mY
λ[4] := 0.693/0.0044
(8 - 18)*MeV
SE4A(E) := 0.0001451*E^5 - 0.0144396*E^4 + 0.3575151*E^3 - 2.5829705*E^2 + 6.557881*E - 4.6758822
(19 - 30)*MeV
SE4B(E) := -0.000422451*E^6 + 0.0606372*E^5 - 3.6062*E^4 + 113.746*E^3 - 2007.13*E^2 + 18789.7*E - 72799.5
C4(E1, E2) :=
    v ← 0 if (E2 ≤ 8)
    if (8 < E2 ≤ 18)
        v ← integral((0.0001451*E^5 - 0.0144396*E^4 + 0.3575151*E^3 - 2.5829705*E^2 + 6.557881*E - 4.6758822)/(0.135151*E^-0.735593), E = 8 .. E2) if E1 ≤ 8
        v ← integral((0.0001451*E^5 - 0.0144396*E^4 + 0.3575151*E^3 - 2.5829705*E^2 + 6.557881*E - 4.6758822)/(0.135151*E^-0.735593), E = E1 .. E2) if 8 < E1 ≤ 18
    if (18 < E2 ≤ 30)
        v ← integral((0.0001451*E^5 - 0.0144396*E^4 + 0.3575151*E^3 - 2.5829705*E^2 + 6.557881*E - 4.6758822)/(0.135151*E^-0.735593), E = E1 .. 18) + integral((-0.000422451*E^6 + 0.0606372*E^5 - 3.6062*E^4 + 113.746*E^3 - 2007.13*E^2 + 18789.7*E - 72799.5)/(0.135151*E^-0.735593), E = 18 .. E2) if E1 < 18
        v ← integral((-0.000422451*E^6 + 0.0606372*E^5 - 3.6062*E^4 + 113.746*E^3 - 2007.13*E^2 + 18789.7*E - 72799.5)/(0.135151*E^-0.735593), E = E1 .. E2) if E1 ≥ 18
# Reacción 5:(p,x)88Y
λ[5] := 0.693/2559.024
16 - 30*MeV
SE5 := 0.000089728095*E^5 - 0.0092002152*E^4 + 0.16174822*E^3 + 5.466854*E^2 - 154.13431*E + 951.65334  # error: Esta variable no está definida.
C5(E1, E2) :=
    v ← 0 if (E2 ≤ 16)
    if (16 < E2 ≤ 30)
        v ← integral((0.000089728095*E^5 - 0.0092002152*E^4 + 0.16174822*E^3 + 5.466854*E^2 - 154.13431*E + 951.65334)/(0.135151*E^-0.735593), E = 16 .. E2) if E1 ≤ 16
        v ← integral((0.000089728095*E^5 - 0.0092002152*E^4 + 0.16174822*E^3 + 5.466854*E^2 - 154.13431*E + 951.65334)/(0.135151*E^-0.735593), E = E1 .. E2) if 16 < E1
24 - 30*MeV
# Reacción 6:(p,x)87gY
λ[6] := 0.693/79.8
SE6(E) := 0.0008826711*E^6 - 0.12940502*E^5 + 7.8272809*E^4 - 249.99246*E^3 + 4447.0161*E^2 - 41784.978*E + 162073.95
C6(E1, E2) :=
    v ← 0 if (E2 ≤ 24)
    if (24 < E2 ≤ 30)
        v ← integral((0.000089728095*E^5 - 0.0092002152*E^4 + 0.16174822*E^3 + 5.466854*E^2 - 154.13431*E + 951.65334)/(0.135151*E^-0.735593), E = 24 .. E2) if E1 ≤ 24
        v ← integral((0.000089728095*E^5 - 0.0092002152*E^4 + 0.16174822*E^3 + 5.466854*E^2 - 154.13431*E + 951.65334)/(0.135151*E^-0.735593), E = E1 .. E2) if 24 < E1
(22 - 30)*MeV
SE7(E) := -0.098117368*E^4 + 9.7075447*E^3 - 354.81937*E^2 + 5690.6527*E - 33843.078
# Reacción 7:(p,n)87mY
λ[7] := 0.693/13.37
C7(E1, E2) :=
    v ← 0 if (E2 ≤ 22)
    if (22 < E2 ≤ 30)
        v ← integral((-0.098117368*E^4 + 9.7075447*E^3 - 354.81937*E^2 + 5690.6527*E - 33843.078)/(0.135151*E^-0.735593), E = 22 .. E2) if E1 ≤ 22
        v ← integral((-0.098117368*E^4 + 9.7075447*E^3 - 354.81937*E^2 + 5690.6527*E - 33843.078)/(0.135151*E^-0.735593), E = E1 .. E2) if 22 < E1
# Reacción 8: (p,x)87mSr
λ[8] := 0.0693/2.815
(24 - 30)*MeV
SE8(E) := -0.0000816*E^4 + 0.0085356*E^3 - 0.3200135*E^2 + 5.1570953*E - 30.341415
C8(E1, E2) :=
    v ← 0 if (E2 ≤ 24)
    if (24 < E2 ≤ 30)
        v ← integral((-0.0000816*E^4 + 0.0085356*E^3 - 0.3200135*E^2 + 5.1570953*E - 30.341415)/(0.135151*E^-0.735593), E = 24 .. E2) if E1 ≤ 24
        v ← integral((-0.0000816*E^4 + 0.0085356*E^3 - 0.3200135*E^2 + 5.1570953*E - 30.341415)/(0.135151*E^-0.735593), E = E1 .. E2) if 24 < E1
# Reacción 9: (p,na) 85gSr
λ[9] := 0.693/1556.376
20 - 30*MeV
SE9(E) := -0.0000262454*E^6 + 0.00389445*E^5 - 0.237927*E^4 + 7.64365*E^3 - 135.846*E^2 + 1264.54*E - 4815.1
SE9(26) = 12.7143
C9(E1, E2) :=
    v ← 0 if (E2 ≤ 20)
    if (20 < E2 ≤ 30)
        v ← integral((-0.0000262454*E^6 + 0.00389445*E^5 - 0.237927*E^4 + 7.64365*E^3 - 135.846*E^2 + 1264.54*E - 4815.1)/(0.135151*E^-0.735593), E = 20 .. E2) if E1 ≤ 20
        v ← integral((-0.0000262454*E^6 + 0.00389445*E^5 - 0.237927*E^4 + 7.64365*E^3 - 135.846*E^2 + 1264.54*E - 4815.1)/(0.135151*E^-0.735593), E = E1 .. E2) if 20 < E1
# Reacción 10: (p,na) 85mSr
λ[10] := 0.693/1.127
20 - 30*MeV
SE10(E) := 0.0001003*E^5 - 0.0115637*E^4 + 0.522381*E^3 - 11.5384122*E^2 + 124.7247662*E - 528.7799608
C10(E1, E2) :=
    v ← 0 if (E2 ≤ 20)
    if (20 < E2 ≤ 30)
        v ← integral((0.0001003*E^5 - 0.0115637*E^4 + 0.522381*E^3 - 11.5384122*E^2 + 124.7247662*E - 528.7799608)/(0.135151*E^-0.735593), E = 20 .. E2) if E1 ≤ 20
        v ← integral((0.0001003*E^5 - 0.0115637*E^4 + 0.522381*E^3 - 11.5384122*E^2 + 124.7247662*E - 528.7799608)/(0.135151*E^-0.735593), E = E1 .. E2) if 20 < E1
# Condiciones de Irradiación
td := 120  # h
E1 := 27.5  # MeV
E2 := 30  # MeV
r := 10  # μA  # h
# Cálculo de las actividades a EOB:
# I:electrones/s
# Na:at/mol
# lambda:h-1
μA := 6.2414*10^12
Na := 6.023*10^23
ti := [0.33; 0.67; 1; 1.5; 2; 2.5; 3; 3.5; 4; 5; 6; 7; 8]
C1(E1, E2) = 0
C3(E1, E2) = 87060.1
C5(E1, E2) = 78091.8
C7(E1, E2) = 29232.3
C9(E1, E2) = 3864.96
I := μA*r = 62414000000000
C2(E1, E2) = 2591.56
C4(E1, E2) = 25081.9
C6(E1, E2) = 78091.8
C8(E1, E2) = 111.521
C10(E1, E2) = 712.729
const := I*Na/MY*ρY*10^-27/(ρblanco*1000) = 422381
B1 := 1 - λ[4]*e^(-λ[1]*ti)/(λ[4] - λ[1]) - λ[1]*e^(-λ[4]*ti)/(λ[1] - λ[4]) = [0.00285639; 0.00584828; 0.00874359; 0.0131144; 0.0174659; 0.0217982; 0.0261114; 0.0304056; 0.0346809; 0.0431749; 0.0515942; 0.0599395; 0.0682112]
A1mCi := C1(E1, E2)*const/(3.7*10^7) = 0
A4a := [
    A1mCi*B1[0];
    A1mCi*B1[1];
    A1mCi*B1[2];
    A1mCi*B1[3];
    A1mCi*B1[4];
    A1mCi*B1[5];
    A1mCi*B1[6];
    A1mCi*B1[7];
    A1mCi*B1[8];
    A1mCi*B1[9];
    A1mCi*B1[10];
    A1mCi*B1[11];
    A1mCi*B1[12]
] = [0; 0; 0; 0; 0; 0; 0; 0; 0; 0; 0; 0; 0]
A1d := C1(E1, E2)*const/(3.7*10^7)*(1 - e^(-λ[1]*ti)) = [0; 0; 0; 0; 0; 0; 0; 0; 0; 0; 0; 0; 0]
A2mCi := C2(E1, E2)*const/(3.7*10^7) = 29.5846
C2(E1, E2)*const = 1.09463e9
B2a := 1 - λ[4]*e^(-λ[2]*ti)/(λ[4] - λ[2]) - λ[2]*e^(-λ[4]*ti)/(λ[2] - λ[4]) = [0.960616; 0.998686; 0.999952; 1; 1; 1; 1; 1; 1; 1; 1; 1; 1]
B2b := 1 - λ[1]*e^(-λ[2]*ti)/(λ[1] - λ[2]) - λ[2]*e^(-λ[1]*ti)/(λ[2] - λ[1]) = [0.00206295; 0.00502578; 0.00792244; 0.0122968; 0.0166519; 0.0209878; 0.0253046; 0.0296024; 0.0338812; 0.0423822; 0.0508085; 0.0591607; 0.0674393]
A4b := [
    A2mCi*B2a[0]*0.0623;
    A2mCi*B2a[1]*0.0623;
    A2mCi*B2a[2]*0.0623;
    A2mCi*B2a[3]*0.0623;
    A2mCi*B2a[4]*0.0623;
    A2mCi*B2a[5]*0.0623;
    A2mCi*B2a[6]*0.0623;
    A2mCi*B2a[7]*0.0623;
    A2mCi*B2a[8]*0.0623;
    A2mCi*B2a[9]*0.0623;
    A2mCi*B2a[10]*0.0623;
    A2mCi*B2a[11]*0.0623;
    A2mCi*B2a[12]*0.0623
] = [1.77053; 1.8407; 1.84303; 1.84312; 1.84312; 1.84312; 1.84312; 1.84312; 1.84312; 1.84312; 1.84312; 1.84312; 1.84312]
A2d := C2(E1, E2)*const/(3.7*10^7)*(1 - e^(-λ[2]*ti)) = [28.4934; 29.5481; 29.5832; 29.5845; 29.5846; 29.5846; 29.5846; 29.5846; 29.5846; 29.5846; 29.5846; 29.5846; 29.5846]
A1a := [
    A2mCi*B2b[0]*0.9377;
    A2mCi*B2b[1]*0.9377;
    A2mCi*B2b[2]*0.9377;
    A2mCi*B2b[3]*0.9377;
    A2mCi*B2b[4]*0.9377;
    A2mCi*B2b[5]*0.9377;
    A2mCi*B2b[6]*0.9377;
    A2mCi*B2b[7]*0.9377;
    A2mCi*B2b[8]*0.9377;
    A2mCi*B2b[9]*0.9377;
    A2mCi*B2b[10]*0.9377;
    A2mCi*B2b[11]*0.9377;
    A2mCi*B2b[12]*0.9377
] = [0.0572292; 0.139422; 0.21978; 0.341131; 0.461948; 0.582232; 0.701986; 0.821212; 0.939912; 1.17574; 1.4095; 1.6412; 1.87086]
A3mCi := C3(E1, E2)*const/(3.7*10^7) = 993.853
B3 := 1 - λ[5]*e^(-λ[3]*ti)/(λ[5] - λ[3]) - λ[3]*e^(-λ[5]*ti)/(λ[3] - λ[5]) = [5.10485e-9; 2.10414e-8; 4.68701e-8; 1.05447e-7; 1.87442e-7; 2.92848e-7; 4.21657e-7; 5.73863e-7; 7.49458e-7; 1.17079e-6; 1.68559e-6; 2.2938e-6; 2.99537e-6]
A5a := [
    A3mCi*B3[0];
    A3mCi*B3[1];
    A3mCi*B3[2];
    A3mCi*B3[3];
    A3mCi*B3[4];
    A3mCi*B3[5];
    A3mCi*B3[6];
    A3mCi*B3[7];
    A3mCi*B3[8];
    A3mCi*B3[9];
    A3mCi*B3[10];
    A3mCi*B3[11];
    A3mCi*B3[12]
] = [5.07348e-6; 2.09121e-5; 4.6582e-5; 0.000104799; 0.00018629; 0.000291047; 0.000419065; 0.000570336; 0.000744852; 0.00116359; 0.00167523; 0.0022797; 0.00297696]
A3d := C3(E1, E2)*const/(3.7*10^7)*(1 - e^(-λ[3]*ti)) = [0.113545; 0.230517; 0.344035; 0.516008; 0.687952; 0.859865; 1.03175; 1.2036; 1.37543; 1.71899; 2.06243; 2.40575; 2.74895]
A4mCi := C4(E1, E2)*const/(3.7*10^7)*(1 - e^(-λ[4]*ti)) = [286.328; 286.328; 286.328; 286.328; 286.328; 286.328; 286.328; 286.328; 286.328; 286.328; 286.328; 286.328; 286.328]
A5mCi := C5(E1, E2)*const/(3.7*10^7)*(1 - e^(-λ[5]*ti)) = [0.0796639; 0.161734; 0.241384; 0.362051; 0.482703; 0.603337; 0.723956; 0.844558; 0.965144; 1.20627; 1.44732; 1.68832; 1.92924]
A6mCi := C6(E1, E2)*const/(3.7*10^7) = 891.473
B6 := 1 - λ[6]*e^(-λ[8]*ti)/(λ[6] - λ[8]) - λ[8]*e^(-λ[6]*ti)/(λ[8] - λ[6]) = [1.15983e-5; 4.76296e-5; 0.000105716; 0.000236548; 0.000418211; 0.000649857; 0.000930648; 0.00125976; 0.00163637; 0.0025289; 0.00360192; 0.00484931; 0.00626508]
A8a := [
    A6mCi*B6[0];
    A6mCi*B6[1];
    A6mCi*B6[2];
    A6mCi*B6[3];
    A6mCi*B6[4];
    A6mCi*B6[5];
    A6mCi*B6[6];
    A6mCi*B6[7];
    A6mCi*B6[8];
    A6mCi*B6[9];
    A6mCi*B6[10];
    A6mCi*B6[11];
    A6mCi*B6[12]
] = [0.0103395; 0.0424606; 0.0942428; 0.210876; 0.372824; 0.57933; 0.829648; 1.12304; 1.45878; 2.25444; 3.21102; 4.32303; 5.58515]
A6d := C6(E1, E2)*const/(3.7*10^7)*(1 - e^(-λ[6]*ti)) = [2.55112; 5.17191; 7.70822; 11.5373; 15.3498; 19.1458; 22.9253; 26.6884; 30.4353; 37.8804; 45.261; 52.5779; 59.8315]
A7mCi := C7(E1, E2)*const/(3.7*10^7) = 333.708
B7a := 1 - λ[7]*e^(-λ[6]*ti)/(λ[7] - λ[6]) - λ[6]*e^(-λ[7]*ti)/(λ[6] - λ[7]) = [2.43468e-5; 9.96769e-5; 0.000220582; 0.000491367; 0.000864872; 0.00133799; 0.00190771; 0.00257108; 0.00332523; 0.00509482; 0.00719504; 0.00960553; 0.012307]
B7b := 1 - λ[7]*e^(-λ[8]*ti)/(λ[7] - λ[8]) - λ[8]*e^(-λ[7]*ti)/(λ[8] - λ[7]) = [6.88977e-5; 0.000281561; 0.00062199; 0.00138186; 0.00242577; 0.00374275; 0.00532214; 0.0071536; 0.00922712; 0.0140617; 0.0197515; 0.0262266; 0.0334212]
A7d := C7(E1, E2)*const/(3.7*10^7)*(1 - e^(-λ[7]*ti)) = [5.65944; 11.39; 16.8563; 24.9624; 32.8611; 40.5578; 48.0575; 55.3654; 62.4863; 76.1863; 89.1942; 101.545; 113.272]
A6a := [
    A7mCi*B7a[0]*0.9843;
    A7mCi*B7a[1]*0.9843;
    A7mCi*B7a[2]*0.9843;
    A7mCi*B7a[3]*0.9843;
    A7mCi*B7a[4]*0.9843;
    A7mCi*B7a[5]*0.9843;
    A7mCi*B7a[6]*0.9843;
    A7mCi*B7a[7]*0.9843;
    A7mCi*B7a[8]*0.9843;
    A7mCi*B7a[9]*0.9843;
    A7mCi*B7a[10]*0.9843;
    A7mCi*B7a[11]*0.9843;
    A7mCi*B7a[12]*0.9843
] = [0.00799716; 0.0327407; 0.0724542; 0.161399; 0.284083; 0.439489; 0.626623; 0.844518; 1.09224; 1.67349; 2.36334; 3.15512; 4.04248]
A8b := [
    A7mCi*B7b[0]*0.0157;
    A7mCi*B7b[1]*0.0157;
    A7mCi*B7b[2]*0.0157;
    A7mCi*B7b[3]*0.0157;
    A7mCi*B7b[4]*0.0157;
    A7mCi*B7b[5]*0.0157;
    A7mCi*B7b[6]*0.0157;
    A7mCi*B7b[7]*0.0157;
    A7mCi*B7b[8]*0.0157;
    A7mCi*B7b[9]*0.0157;
    A7mCi*B7b[10]*0.0157;
    A7mCi*B7b[11]*0.0157;
    A7mCi*B7b[12]*0.0157
] = [0.00036097; 0.00147516; 0.00325874; 0.00723984; 0.0127091; 0.019609; 0.0278838; 0.0374793; 0.0483429; 0.0736722; 0.103482; 0.137407; 0.175101]
A8mCi := C8(E1, E2)*const/(3.7*10^7)*(1 - e^(-λ[8]*ti)) = [0.0103007; 0.0208264; 0.0309586; 0.0461544; 0.0611643; 0.0759906; 0.0906355; 0.105101; 0.11939; 0.147445; 0.174818; 0.201526; 0.227584]
A9mCi := C9(E1, E2)*const/(3.7*10^7)*(1 - e^(-λ[9]*ti)) = [0.00648259; 0.0131606; 0.0196413; 0.0294586; 0.0392738; 0.0490868; 0.0588976; 0.0687062; 0.0785127; 0.098119; 0.117717; 0.137306; 0.156886]
A10mCi := C10(E1, E2)*const/(3.7*10^7) = 8.13631
A10d := C10(E1, E2)*const/(3.7*10^7)*(1 - e^(-λ[10]*ti)) = [1.49428; 2.74737; 3.73708; 4.90148; 5.75768; 6.38726; 6.85021; 7.19062; 7.44092; 7.76032; 7.93301; 8.02639; 8.07688]
B10 := 1 - λ[10]*e^(-λ[9]*ti)/(λ[10] - λ[9]) - λ[9]*e^(-λ[10]*ti)/(λ[9] - λ[10]) = [1.39483e-5; 5.3811e-5; 0.000112654; 0.000231619; 0.000377983; 0.000544482; 0.000725772; 0.000917926; 0.00111806; 0.0015343; 0.00196342; 0.00239941; 0.00283901]
A9a := [
    A10mCi*B10[0]*0.866;
    A10mCi*B10[1]*0.866;
    A10mCi*B10[2]*0.866;
    A10mCi*B10[3]*0.866;
    A10mCi*B10[4]*0.866;
    A10mCi*B10[5]*0.866;
    A10mCi*B10[6]*0.866;
    A10mCi*B10[7]*0.866;
    A10mCi*B10[8]*0.866;
    A10mCi*B10[9]*0.866;
    A10mCi*B10[10]*0.866;
    A10mCi*B10[11]*0.866;
    A10mCi*B10[12]*0.866
] = [9.82802e-5; 0.000379155; 0.000793764; 0.001632; 0.00266329; 0.00383644; 0.00511382; 0.00646775; 0.00787786; 0.0108108; 0.0138344; 0.0169063; 0.0200038]
A89gZrmCi := A1d + A1a = [0.0572292; 0.139422; 0.21978; 0.341131; 0.461948; 0.582232; 0.701986; 0.821212; 0.939912; 1.17574; 1.4095; 1.6412; 1.87086]
A89mZrmCi := A2d = [28.4934; 29.5481; 29.5832; 29.5845; 29.5846; 29.5846; 29.5846; 29.5846; 29.5846; 29.5846; 29.5846; 29.5846; 29.5846]
A88YmCi := A5mCi + A5a = [0.079669; 0.161755; 0.241431; 0.362156; 0.482889; 0.603628; 0.724375; 0.845128; 0.965889; 1.20743; 1.449; 1.6906; 1.93222]
A88ZrmCi := A3d = [0.113545; 0.230517; 0.344035; 0.516008; 0.687952; 0.859865; 1.03175; 1.2036; 1.37543; 1.71899; 2.06243; 2.40575; 2.74895]
A89mYmCi := A4mCi + A4a + A4b = [288.098; 288.169; 288.171; 288.171; 288.171; 288.171; 288.171; 288.171; 288.171; 288.171; 288.171; 288.171; 288.171]
A87mYmCi := A7d = [5.65944; 11.39; 16.8563; 24.9624; 32.8611; 40.5578; 48.0575; 55.3654; 62.4863; 76.1863; 89.1942; 101.545; 113.272]
A87mSrmCi := A8mCi + A8a + A8b = [0.0210012; 0.0647621; 0.12846; 0.26427; 0.446698; 0.67493; 0.948167; 1.26562; 1.62651; 2.47556; 3.48932; 4.66196; 5.98784]
A85gSrmCi := A9mCi + A9a = [0.00658087; 0.0135398; 0.020435; 0.0310906; 0.0419371; 0.0529233; 0.0640114; 0.075174; 0.0863905; 0.10893; 0.131551; 0.154212; 0.176889]
A85mSrCi := A10d = [1.49428; 2.74737; 3.73708; 4.90148; 5.75768; 6.38726; 6.85021; 7.19062; 7.44092; 7.76032; 7.93301; 8.02639; 8.07688]
A87gYmCi := A6d + A6a = [2.55911; 5.20465; 7.78068; 11.6987; 15.6339; 19.5853; 23.5519; 27.533; 31.5275; 39.5538; 47.6244; 55.733; 63.874]
